// SBML level 2 version 1

model main()

  // Compartments:
  compartment graphfab_default_compartment = 1;

  // Species:
  species MKKK in graphfab_default_compartment = 0;
  species MKKK_P in graphfab_default_compartment = 0;
  species MKK in graphfab_default_compartment = 0;
  species MKK_P in graphfab_default_compartment = 0;
  species MKK_PP in graphfab_default_compartment = 0;
  species MAPK in graphfab_default_compartment = 0;
  species MAPK_P in graphfab_default_compartment = 0;
  species MAPK_PP in graphfab_default_compartment = 0;

  // Reactions:
  J0: MKKK => MKKK_P; 1;  // modifiers: MAPK_PP
  J1: MKKK_P => MKKK; 1;
  J2: MKK => MKK_P; 1;  // modifiers: MKKK_P
  J3: MKK_P => MKK_PP; 1;  // modifiers: MKKK_P
  J4: MKK_PP => MKK_P; 1;
  J5: MKK_P => MKK; 1;
  J6: MAPK => MAPK_P; 1;  // modifiers: MKK_PP
  J7: MAPK_P => MAPK_PP; 1;  // modifiers: MKK_PP
  J8: MAPK_PP => MAPK_P; 1;
  J9: MAPK_P => MAPK; 1;
end
